# Følgende er taget udgangspunkt i side 749 i ASB bogen (The Analysis and Design of Linear Circuits):
# Beregning af ζ:
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ω == f*2*π
ω_0 := 120000*2*π = 753982
B == Bandwidth*2*π
B := 10000*2*π = 62831.9
B == 2*ζ*ω_0 solve, ζ → 0.0416666666667
# --------------------------------------------------------------------------------------------------------------
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# Beregning af kredsløbets overføringsfunktion vha. knudepunktsanalyse:
Z_1 == 1/(C_1*s)
Z_2 == 1/(C_2*s)
i_C2 := (V_A - 0)/Z_2  # error: This variable is undefined. Check that the label is set correctly.
i_R2 := (0 - V_2)/R_2  # error: This variable is undefined. Check that the label is set correctly.
V_A := i_C2 == i_R2 → V_A/Z_2 == -V_2/R_2 solve, V_A → -V_2*Z_2/R_2
V_out := (V_1 - V_A)/R_1 == (V_A - 0)/Z_2 + (V_A - V_2)/Z_1 simplify → (R_2*V_1 + V_2*Z_2)/(R_1*R_2) == -V_2*(R_2 + Z_1 + Z_2)/(R_2*Z_1)
V_out solve, V_2 → -R_2*V_1*Z_1/(R_1*R_2 + R_1*Z_1 + R_1*Z_2 + Z_1*Z_2)
Z_1 := 1/(C_1*s)  # error: This variable is undefined. Check that the label is set correctly.
Z_2 := 1/(C_2*s)  # error: This variable is undefined. Check that the label is set correctly.
(-R_2*V_1*Z_1/(R_1*R_2 + R_1*Z_1 + R_1*Z_2 + Z_1*Z_2))/V_1 collect, C_1; expand; collect, s → -s*C_2*R_2/(C_1*R_1*C_2*R_2*s^2 + (C_1*R_1 + R_1*C_2)*s + 1)
clear(ω_0)
T(s) := K(s/ω_0)/((s/ω_0)^2 + 2*ζ*s/ω_0 + 1)  # error: This variable is undefined. Check that the label is set correctly.
(s/ω_0)^2 == s^2*(1/ω_0)^2
s^2*(1/ω_0)^2 == R_1*R_2*C_1*C_2*s^2
ω_0 := 1/ω_0 == sqrt(R_1*R_2*C_1*C_2) solve, ω_0 → (C_1*R_1*C_2*R_2)^(-1/2)
2*ζ*s/ω_0 == R_1*C_1 + R_1*C_2*s
ζ := 2*ζ*1/ω_0 == R_1*C_1 + R_1*C_2 solve, ζ → (C_1*R_1 + R_1*C_2)/(2*sqrt(C_1*R_1*C_2*R_2))
B := B == 2*ζ*ω_0 simplify → 7853981633974483/125000000000 == (C_1 + C_2)/(C_1*C_2*R_2)
C_1 := 3.3*10^-9
C_2 := C_1
R_2 := 7853981633974483/125000000000 == (C_1 + C_2)/(C_1*C_2*R_2) solve, R_2 → 9645.75412678 = 9645.75
ω_0 := 120000*2*π
1/ω_0 == sqrt(R_1*R_2*C_1*C_2) solve, R_1 → 16.7461009146
