# Beregninger til design af aktivt højpasfilter:
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# Ovenstående kredsløb er lavet ud fra kapitel 14 i ASB bogen, starter side 743 hvor den generelle overføringsfunktion T(s) er givet, og på side 744 ses det overordene design.
#
# De skarpe vil opdage at der mangler modstandene RA samt RB i kredsløbet og at de er erstattet af et feedback loop fra output til - på opampen, dette skyldes at det er valgt at sætte forstærkningen u til 1. Uddybene forklaring af dette findes i kapitetlet i bogen, men kort sagt resultere det i at man laver short circuit på RB og op på RA hvilket giver ovenstående diagram.
# Vi starte med at lave en knudepunktsanalyse ud fra diagrammet, knudepunkterne er navngivet på diagrammet, og det er det punkter der bliver anvendt her under.
# Først kigger vi på hvordan det ser ud ud fra op ampen. vi ved om op amps at strømmen ind i opampen = 0 og at spændingsforskellen mellem de 2 indgange = 0.
# Anvender vi de informationer på vores kredsløb for vi givet at indgangsspændingerne på opampen må være ligmed Vout grundet feedback loopet, derfor vil spændingen i knudepunktet Vb være givet:
V_b == V_out
# derfor vil du ikke finde Vb i nogle af de følgende kredsløbsligninger der der er udskiftet med Vout for at mindske antallet af ubekendte vi regner på.
# For at simplificere formlerne yderlige er kondensatorenes impedanser benævnt hhv Z1 og Z2 hvilket giver os:
Z_1 == 1/(C_1*s)
Z_2 == 1/(C_2*s)
# Der vil blive anvendt Z1 og Z2 i de efterfølgende beregninger ind til vi begynder at finde frem til komponentværdierne ;)
# Vi starter med at lave KCL i knudepunktet b. Dette giver os :
(V_A - V_out)/Z_2 == V_out/R_2
# Da der ikke løber en strøm gennem opamp indgangen vil strømmen gennem Z2 være lig med strømmen gennem R2, dette anvender vi til at finde et udtryk for Va
V_A := (V_A - V_out)/Z_2 == V_out/R_2 solve, V_A → (R_2*V_out + Z_2*V_out)/R_2
# I knude punktet Va laver vi nu KCL ( husk at Vb er = Vout og allerede er udskiftet i ligningen) hvilket giver os at strømmen gennem Z1 er lig med summen er strømmene gemmen Z2 og R1
(V_in - V_A)/Z_1 == (V_A - V_out)/Z_2 + (V_A - V_out)/R_1
# indsætter vi nu vores udtryk for Va og laver en simplify for vi:
(V_in - V_A)/Z_1 == (V_A - V_out)/Z_2 + (V_A - V_out)/R_1 simplify → -(R_2*V_out - R_2*V_in + Z_2*V_out)/(R_2*Z_1) == V_out*(R_1 + Z_2)/(R_1*R_2)
# Nu skal vi så bruge vores impedanser for at finde overføringsfunktionen for vores kredsløb ( Vout/Vin)
Z_1 := 1/(C_1*s)  # error: This variable is undefined. Check that the label is set correctly.
Z_2 := 1/(C_2*s)  # error: This variable is undefined. Check that the label is set correctly.
# Disse indsættes i formlen vi fandt ovenfor der nu kun indeholder Vin Vout og vores komponenter, herefter solves der for Vin. giver et for langt output til at kunne vises på en side ;)
-(R_2*V_out - R_2*V_in + Z_2*V_out)/(R_2*Z_1) == V_out*(R_1 + Z_2)/(R_1*R_2) simplify; solve, V_in → (V_out + s*C_1*R_1*V_out + s*R_1*C_2*V_out + s^2*C_1*R_1*C_2*R_2*V_out)/(s^2*C_1*R_1*C_2*R_2)
# Vout sættes uden for parentes.
V_in == V_out*(1 + s*C_1*R_1 + s*R_1*C_2 + s^2*C_1*R_1*C_2*R_2)/(s^2*C_1*R_1*C_2*R_2)
# Vout flyttes over på den anden side a lighedstegnet, og så er vi der næsten, nu har vi Vin/Vout, vi laver en collect s, for at få det over på en form der minder om det vi skal bruge.
V_in/V_out == (1 + s*C_1*R_1 + s*R_1*C_2 + s^2*C_1*R_1*C_2*R_2)/(s^2*C_1*R_1*C_2*R_2) collect, s → V_in/V_out == (s*C_1*R_1 + s*R_1*C_2 + s^2*C_1*R_1*C_2*R_2 + 1)/(s^2*C_1*R_1*C_2*R_2)
# Da Vin/Vout er det inverse af Vout/Vin inverteres der på begge sider af lighedstegnet, hvilket giver os Vout/Vin også kendt som overføringsfunktionen for kredsløbet
((s*C_1*R_1 + s*R_1*C_2 + s^2*C_1*R_1*C_2*R_2 + 1)/(s^2*C_1*R_1*C_2*R_2))^-1 simplify; collect, s → s^2*C_1*R_1*C_2*R_2/(C_1*R_1*C_2*R_2*s^2 + (C_1*R_1 + R_1*C_2)*s + 1)
# Da vi er ude efter at kunne beregne vores komponentværdier ud fra en ønsket cutoff og dæmpning(ζ) sammenligner vi nu vores overføringsfunktion med standard overføringsfunktionen, som findes i bogen.
# K = 1 da vi valgte at forstærkningen skulle være = 1
T(s) == K(s/ω_0)^2/((s/ω_0)^2 + 2*ζ(s/ω_0) + 1)
K := 1
# dette giver os overføringsfunktionerne som er vist her under
s^2*C_1*R_1*C_2*R_2/(C_1*R_1*C_2*R_2*s^2 + (C_1*R_1 + R_1*C_2)*s + 1)
T(s) == (s/ω_0)^2/((s/ω_0)^2 + 2*ζ(s/ω_0) + 1)
# til hjælp for forståelsen:
(s/ω_0)^2 → s^2/ω_0^2
# for at simplificere komponentberegningerne vælger vi at anvende 2 ens kondensator, derfor sættes C1 til at være lig med C2 hvorved alle vores beregninger vil være ud fra værdien på C2.
C_1 := C_2  # error: This variable is undefined. Check that the label is set correctly.
# vi sammenligner nu nævneren i de 2 overføringsfunktioner og sætter vores komponent værdier til at være udtrykt ud fra zeta og cutoff frekvensen, dette giver os følgende simplificerede funktioner der gør det muligt at beregne de ønskede komponentværder til vores filter.
1/ω_0 == sqrt(C_1*R_1*C_2*R_2) → 1/ω_0 == sqrt(R_1*C_2^2*R_2)
2*ζ/ω_0 == C_1*R_1 + R_1*C_2 → 2*ζ/ω_0 == 2*R_1*C_2
# vi definere nu vores ønskede Zeta samt cutoff, og vælger en kondensator størrelse, her er der valgt 3.3 nF da det er en størrelse vi som regel altid har på komponentlageret, og samtidig som det ses giver det nogle rimelig tilforladelige modstandsstørrelser. Cutoff frekvensen omregnes til rad/s, Zeta vælges til 0.5 da det giver en ønskværdig frekvenskarekteristik, se side 743 nederst, der vil i se at vi får et mere direkte knæk ved cutoff fremm for den bløde dæmpning vi er van til, hvilket mindsker det spektre omkring cutoff der bliver fejlagtigt dæmpet, dette giver mulighed for at ligge cutoff rimelig tæt på vores 120 kHz, her vælges den til 90 kHz
C_2 := 3.3 nF
w_0 := 90 kHz*2*π = 565487 rad/s
ζ := 0.5
ω_0 := 565.48668*10^3 rad/s
# Vi anvender nu disse oplysninger og vores ene formel indeholdende kun R1 og C2 som komponentværdier til at bestemme R1
R_1 := 2*ζ/ω_0 == 2*R_1*C_2 solve, R_1 → 2.67937613518*10^-7*s/(nF*rad) = 267.938 Ω
# Herefter anvendes R1 samt den anden formel til at bestemme R2
1/ω_0 == sqrt(R_1*C_2^2*R_2) solve, R_2 → 1.07175045407*10^-15*s^2/(nF^2*rad^2*Ω) = 1.07175 kΩ
# Disse komponentværdier anvendes i kredsløbet i multisim til simulering af filtret, se multisim fil for yderlige information herom
