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V_A := (V_A - V_out)/Z_2 == V_out/R_2 solve, V_A → (R_2*V_out + Z_2*V_out)/R_2
(V_in - V_A)/Z_1 == (V_A - V_out)/Z_2 + (V_A - V_out)/R_1 simplify → -(R_2*V_out - R_2*V_in + Z_2*V_out)/(R_2*Z_1) == V_out*(R_1 + Z_2)/(R_1*R_2)
Z_1 := 1/(C_1*s)  # error: This variable is undefined. Check that the label is set correctly.
Z_2 := 1/(C_2*s)  # error: This variable is undefined. Check that the label is set correctly.
-(R_2*V_out - R_2*V_in + Z_2*V_out)/(R_2*Z_1) == V_out*(R_1 + Z_2)/(R_1*R_2) simplify, solve, V_in → (V_out + s*C_1*R_1*V_out + s*R_1*C_2*V_out + s^2*C_1*R_1*C_2*R_2*V_out)/(s^2*C_1*R_1*C_2*R_2)
V_in == V_out*(1 + s*C_1*R_1 + s*R_1*C_2 + s^2*C_1*R_1*C_2*R_2)/(s^2*C_1*R_1*C_2*R_2)
V_in/V_out == (1 + s*C_1*R_1 + s*R_1*C_2 + s^2*C_1*R_1*C_2*R_2)/(s^2*C_1*R_1*C_2*R_2) collect, s → V_in/V_out == (s*C_1*R_1 + s*R_1*C_2 + s^2*C_1*R_1*C_2*R_2 + 1)/(s^2*C_1*R_1*C_2*R_2)
((s*C_1*R_1 + s*R_1*C_2 + s^2*C_1*R_1*C_2*R_2 + 1)/(s^2*C_1*R_1*C_2*R_2))^-1 simplify; collect, s → s^2*C_1*R_1*C_2*R_2/(C_1*R_1*C_2*R_2*s^2 + (C_1*R_1 + R_1*C_2)*s + 1)
T(s) == K(s/ω_0)^2/((s/ω_0)^2 + 2*ζ(s/ω_0) + 1)
K := 1
T(s) == (s/ω_0)^2/((s/ω_0)^2 + 2*ζ(s/ω_0) + 1)
(s/ω_0)^2 → s^2/ω_0^2
C_1 := C_2  # error: This variable is undefined. Check that the label is set correctly.
1/ω_0 == sqrt(C_1*R_1*C_2*R_2) → 1/ω_0 == sqrt(R_1*C_2^2*R_2)
2*ζ/ω_0 == C_1*R_1 + R_1*C_2 → 2*ζ/ω_0 == 2*R_1*C_2
C_2 := 3.3 nF
w_0 := 90 kHz*2*π = 565487 rad/s
ζ := 0.5
ω_0 := 565.48668*10^3 rad/s
R_1 := 2*ζ/ω_0 == 2*R_1*C_2 solve, R_1 → 2.67937613518*10^-7*s/(nF*rad) = 267.938 Ω
1/ω_0 == sqrt(R_1*C_2^2*R_2) solve, R_2 → 1.07175045407*10^-15*s^2/(nF^2*rad^2*Ω) = 1071.75 Ω
