# høj-pas filter design.
# Design 1 med spole på 1000µH:
α := 120000
ω := α*2*π = 753982
T(s) := s/(s + α) == L*s/(s + α) == k*s/(s + α)  # error: This variable is undefined. Check that the label is set correctly.
T(s) := k*s/(s + α)  # error: This variable is undefined. Check that the label is set correctly.
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k := 1
L := k
T(s) → s*k/(s + 120000)
T(s) := s/(s + 120000)
T(s) := L*s/(L*s + 120000)
k := 1000*10^-6 == 1*k solve → 1/1000 = 0.001
L := (1*k) H = 1000 μH
R := (120000*k)*Ω = 120 Ω
# Design 2 med kondensator:
α := 120000
ω := α*2*π = 753982
T(s) := s/(s + α) == 1/s/(1/s + 1/α) == k*1/s/(1/s + 1/α) == 1/(C*s)/(1/(C*s) + R)  # error: This variable is undefined. Check that the label is set correctly.
T(s) := 1/s/(1/s + 1/α)
C := 180 pF  # <- er valgt fordi den giver en acceptabel værdi for R, og den findes på komponent lageret.
k := 180*10^-12 == 1*1/k solve → 50000000000/9
R := (1/α*k) Ω = 46.2963 kΩ  # <- Dur ikke, da vi får 1V ud ved 5V input.
