# Da transistoren skal benyttes i mætningsområdet og Hfe ifølge datasheet er 220, skal β < Hfe, derfor tages der udgangspunkt i en β == 20
β := i_C/i_B  # error: This variable is undefined. Check that the label is set correctly.
# Der erbejdes med en spænding på 5V på Collector, og en genereret firkant puls på 120 kHz 0-5V på Basen
V_Bin := 5 V
V_Cin := 5 V
# Beregning af R_B:
i_B == (V_Bin - 0.7 V)/R_B solve, R_B → (5.0*V - 0.7*V)/i_B
i_B := 1 mA
R_B := (5.0*V - 0.7*V)/i_B = 4.3 kΩ
# Sikree at i_Cer mindre end 30 mA som er max i følge datasheet
i_C := 20 == i_C/i_B solve, i_C → 20*mA
# Beregning af R_C
i_C == V_Cin/R_C
R_C := 5 V/(20 mA) = 250 Ω
